// SBML level 3 version 1

model MorrisonAllegra()
  // Morrison1989 - Folate Cycle
  // The model describes the folate cycle kinetics in breast cancer cells.
  // This model is described in the article:
  // Folate cycle kinetics in human breast cancer cells.
  // Morrison PF, Allegra CJ.
  // J. Biol. Chem. 1989 Jun; 264(18): 10552-10566
  // Abstract:
  // A mathematical description of polyglutamated folate kinetics for human breast carcinoma cells (MCF-7) has been formulated based upon experimental folate, methotrexate (MTX), purine, and pyrimidine pool sizes as well as reaction rate parameters obtained from intact MCF-7 cells and their enzyme isolates. The schema accounts for the interconversion of highly polyglutamated tetrahydrofolate, 5-methyl-FH4, 5-10-CH2FH4, dihydrofolate (FH2), 10-formyl-FH4 (FFH4), and 10-formyl-FH2 (FFH2), as well as formation and transport of the MTX polyglutamates. Inhibition mechanisms have been chosen to reproduce all observed non-, un-, and pure competition inhibition patterns. Steady state folate concentrations and thymidylate and purine synthesis rates in drug-free intact cells were used to determine normal folate Vmax values. The resulting average-cell folate model, examined for its ability to predict folate pool behavior following exposure to 1 microM MTX over 21 h, agreed well with the experiment, including a relative preservation of the FFH4 and CH2FH4 pools. The results depend strongly on thymidylate synthase (TS) reaction mechanism, especially the assumption that MTX di- and triglutamates inhibit TS synthesis as greatly in the intact cell as they do with purified enzyme. The effects of cell cycle dependence of TS and dihydrofolate reductase activities were also examined by introducing G- to S-phase activity ratios of these enzymes into the model. For activity ratios down to at least 5%, cell population averaged folate pools were only slightly affected, while CH2FH4 pools in S-phase cells were reduced to as little as 10% of control values. Significantly, these folate pool dynamics were indicated to arise from both direct inhibition by MTX polyglutamates as well as inhibition by elevated levels of polyglutamated FH2 and FFH2.
  // Note: two flow BCs were converted into two downstream concentration BCs, thus removing the GAR and dUMP state variables. This dropped the number of ODEs from 21 to 19.
  // This model is hosted on BioModels Database and identified by: BIOMD0000000018.
  // To cite BioModels Database, please use: BioModels Database: An enhanced, curated and annotated resource for published quantitative kinetic models.
  // To the extent possible under law, all copyright and related or neighbouring rights to this encoded model have been dedicated to the public domain worldwide. Please refer to CC0 Public Domain Dedication for more information.
  // This model was automatically converted from BIOMD0000000018 to SBML L3V1 by using libSBML.
  // There were the following warnings during the conversion process:
  // The 'outside' attribute on <compartment>, previously available in SBML Level 2 has been removed as of SBML Level 3 Version 1.
  // In situations where a mathematical expression refers to a compartment, species or parameter, it is necessary to know the units of the object to establish unit consistency. In models where the units of an object have not been declared, libSBML does not yet have the functionality to accurately verify the consistency of the units in mathematical expressions referring to that object. The units of the <parameter> 'Keq' cannot be fully checked. Unit consistency reported as either no errors or further unit errors related to this object may not be accurate.
  // If the attribute 'units' on a given Parameter object has not been set, then the unit of measurement associated with that parameter's value is undefined. Reference: L3V1 Section 4.7.3
  // In situations where a mathematical expression contains literal numbers or parameters whose units have not been declared, it is not possible to verify accurately the consistency of the units in the expression. The units of the <assignmentRule> <math> expression 'FH2f * DHFRf / Keq' cannot be fully checked. Unit consistency reported as either no errors or further unit errors related to this object may not be accurate.
  // In situations where a mathematical expression contains literal numbers or parameters whose units have not been declared, it is not possible to verify accurately the consistency of the units in the expression. The units of the <kineticLaw> <math> expression 'cell * (Vm * (serine / Km2 / (1 + serine / Km2)) * (FH4 / Km1) / (1 + FH4 / Km1))' cannot be fully checked. Unit consistency reported as either no errors or further unit errors related to this object may not be accurate.
  // In situations where a mathematical expression contains literal numbers or parameters whose units have not been declared, it is not possible to verify accurately the consistency of the units in the expression. The units of the <kineticLaw> <math> expression 'cell * (Vm * (glycine / Km2 / (1 + glycine / Km2)) * (CH2FH4 / Km1) / (1 + CH2FH4 / Km1))' cannot be fully checked. Unit consistency reported as either no errors or further unit errors related to this object may not be accurate.
  // In situations where a mathematical expression contains literal numbers or parameters whose units have not been declared, it is not possible to verify accurately the consistency of the units in the expression. The units of the <kineticLaw> <math> expression 'cell * hp * FH4 * HCHO' cannot be fully checked. Unit consistency reported as either no errors or further unit errors related to this object may not be accurate.
  // In situations where a mathematical expression contains literal numbers or parameters whose units have not been declared, it is not possible to verify accurately the consistency of the units in the expression. The units of the <kineticLaw> <math> expression 'cell * hl * CH2FH4' cannot be fully checked. Unit consistency reported as either no errors or further unit errors related to this object may not be accurate.
  // In situations where a mathematical expression contains literal numbers or parameters whose units have not been declared, it is not possible to verify accurately the consistency of the units in the expression. The units of the <kineticLaw> <math> expression 'cell * (Vm * CH2FH4 * NADPH / (NADPH * CH2FH4 + CH2FH4 * Km2 + (NADPH + Km2) * Km1 * (1 + MTX1 / Ki21 + MTX2 / Ki22 + MTX3 / Ki23 + MTX4 / Ki24 + MTX5 / Ki25 + FH2f / Ki1)))' cannot be fully checked. Unit consistency reported as either no errors or further unit errors related to this object may not be accurate.
  // In situations where a mathematical expression contains literal numbers or parameters whose units have not been declared, it is not possible to verify accurately the consistency of the units in the expression. The units of the <kineticLaw> <math> expression 'cell * (Vm * (homocysteine / Km2 / (1 + homocysteine / Km2)) * (CH3FH4 / Km1) / (1 + CH3FH4 / Km1))' cannot be fully checked. Unit consistency reported as either no errors or further unit errors related to this object may not be accurate.
  // In situations where a mathematical expression contains literal numbers or parameters whose units have not been declared, it is not possible to verify accurately the consistency of the units in the expression. The units of the <kineticLaw> <math> expression 'cell * (Vm / ((1 + Km1 / FH4) * (1 + Km2 / ATP) * (1 + Km3 / formate)))' cannot be fully checked. Unit consistency reported as either no errors or further unit errors related to this object may not be accurate.
  // In situations where a mathematical expression contains literal numbers or parameters whose units have not been declared, it is not possible to verify accurately the consistency of the units in the expression. The units of the <kineticLaw> <math> expression 'cell * (Vm * CHOFH4 * GAR / (GAR * CHOFH4 + CHOFH4 * Km2 + (GAR + Km2) * Km1 * (1 + MTX1 / Ki21 + MTX2 / Ki22 + MTX3 / Ki23 + MTX4 / Ki24 + MTX5 / Ki25 + FH2f / Ki1 + FFH2 / Ki1f)))' cannot be fully checked. Unit consistency reported as either no errors or further unit errors related to this object may not be accurate.
  // In situations where a mathematical expression contains literal numbers or parameters whose units have not been declared, it is not possible to verify accurately the consistency of the units in the expression. The units of the <kineticLaw> <math> expression 'cell * (Vm * CHOFH4 * AICAR / (AICAR * CHOFH4 + CHOFH4 * Km2 + (AICAR + Km2) * Km1 * (1 + MTX1 / Ki21 + MTX2 / Ki22 + MTX3 / Ki23 + MTX4 / Ki24 + MTX5 / Ki25 + FH2f / Ki1 + FFH2 / Ki1f)))' cannot be fully checked. Unit consistency reported as either no errors or further unit errors related to this object may not be accurate.
  // In situations where a mathematical expression contains literal numbers or parameters whose units have not been declared, it is not possible to verify accurately the consistency of the units in the expression. The units of the <kineticLaw> <math> expression 'cell * Vm * (CH2FH4 / Km1 / (1 + CH2FH4 / Km1)) * (NADP / Km2 / (1 + NADP / Km2))' cannot be fully checked. Unit consistency reported as either no errors or further unit errors related to this object may not be accurate.
  // In situations where a mathematical expression contains literal numbers or parameters whose units have not been declared, it is not possible to verify accurately the consistency of the units in the expression. The units of the <kineticLaw> <math> expression 'cell * (Vm * CH2FH4 * dUMP / (dUMP * CH2FH4 * (1 + MTX1 / Ki21 + MTX2 / Ki22 + MTX3 / Ki23 + MTX4 / Ki24 + MTX5 / Ki25 + FH2f / Ki1) + Km1 * dUMP * (FFH2 / Ki1f * (MTX1 / Ki21) + (1 + FFH2 / Ki1f) * (1 + MTX2 / Ki22 + MTX3 / Ki23 + MTX4 / Ki24 + MTX5 / Ki25 + FH2f / Ki1)) + Km1 * Km2 * (1 + MTX2 / Ki22 + MTX3 / Ki23 + MTX4 / Ki24 + MTX5 / Ki25 + FH2f / Ki1)))' cannot be fully checked. Unit consistency reported as either no errors or further unit errors related to this object may not be accurate.
  // In situations where a mathematical expression contains literal numbers or parameters whose units have not been declared, it is not possible to verify accurately the consistency of the units in the expression. The units of the <kineticLaw> <math> expression 'cell * kter * FH2b' cannot be fully checked. Unit consistency reported as either no errors or further unit errors related to this object may not be accurate.
  // In situations where a mathematical expression contains literal numbers or parameters whose units have not been declared, it is not possible to verify accurately the consistency of the units in the expression. The units of the <kineticLaw> <math> expression 'cell * Vm * FH2f' cannot be fully checked. Unit consistency reported as either no errors or further unit errors related to this object may not be accurate.
  // In situations where a mathematical expression contains literal numbers or parameters whose units have not been declared, it is not possible to verify accurately the consistency of the units in the expression. The units of the <kineticLaw> <math> expression 'cell * (Vm * FFH2 * AICAR / (AICAR * FFH2 + FFH2 * Km2 + (AICAR + Km2) * Km1 * (1 + MTX1 / Ki21 + MTX2 / Ki22 + MTX3 / Ki23 + MTX4 / Ki24 + MTX5 / Ki25 + FH2f / Ki1 + FFH2 / Ki1f)))' cannot be fully checked. Unit consistency reported as either no errors or further unit errors related to this object may not be accurate.
  // In situations where a mathematical expression contains literal numbers or parameters whose units have not been declared, it is not possible to verify accurately the consistency of the units in the expression. The units of the <kineticLaw> <math> expression 'cell * Vm * (glutamine / Km1 / (1 + glutamine / Km1)) * (FGAR / Km2 / (1 + FGAR / Km2))' cannot be fully checked. Unit consistency reported as either no errors or further unit errors related to this object may not be accurate.
  // In situations where a mathematical expression contains literal numbers or parameters whose units have not been declared, it is not possible to verify accurately the consistency of the units in the expression. The units of the <kineticLaw> <math> expression 'cell * Vm * MTX1' cannot be fully checked. Unit consistency reported as either no errors or further unit errors related to this object may not be accurate.
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  // biomodels.db:MODEL6617317313
  // biomodels.db:BIOMD0000000018
  // isDescribedBy pubmed:2732237
  // hasTaxon taxonomy:9606
  // hasPart kegg.pathway:map00670 kegg.pathway:map00790
  // isVersionOf GO:0046655
  // model units - substance: substance, time: time, volume: volume, area: area, length: metre, extent: substance

  // Compartments:
  compartment ext = 1 volume;  // GO:0005615
  compartment cell = 1 volume;  // GO:0005623

  // Species:
  species FH2f in cell = 0.0012; FH2f is "dihydrofolate free";  // isVersionOf CHEBI:15633 kegg.compound:C00415
  species $FH2b in cell; FH2b is "dihydrofolate bound";  // isVersionOf CHEBI:15633 kegg.compound:C00415
  species DHFRf in cell = 0.64; DHFRf is "dihydrofolate reductase free";  // uniprot:P00374
  species $DHFRtot in cell; DHFRtot is "dihydrofolate reductase total";  // uniprot:P00374
  species FH4 in cell = 0.46; FH4 is "tetrahydrofolate";  // CHEBI:20506 kegg.compound:C00101
  species CH2FH4 in cell = 0.26; CH2FH4 is "5,10-methylene-tetrahydrofolate";  // CHEBI:15636 kegg.compound:C00143
  species CH3FH4 in cell = 1.63; CH3FH4 is "5-methyl-tetrahydrofolate";  // CHEBI:15641 kegg.compound:C00440
  species CHOFH4 in cell = 1; CHOFH4 is "10-formyl-tetrahydrofolate";  // CHEBI:15637 kegg.compound:C00234
  species FFH2 in cell = 0.000332; FFH2 is "10-formyl-dihydrofolate";  // CHEBI:15634 kegg.compound:C03204
  species HCHO in cell = 0.0074;  // CHEBI:16842 kegg.compound:C00067
  species FGAR in cell = 16.49;  // kegg.compound:C04376
  species AICAR in cell = 3.695;  // CHEBI:18406 kegg.compound:C04677
  species MTX1 in cell = 0;  // kegg.compound:C01937
  species MTX2 in cell = 0;  // kegg.compound:C01937
  species MTX3 in cell = 0;  // kegg.compound:C01937
  species MTX4 in cell = 0;  // kegg.compound:C01937
  species MTX5 in cell = 0;  // kegg.compound:C01937
  species MTX1b in cell = 0;  // kegg.compound:C01937
  species MTX2b in cell = 0;  // kegg.compound:C01937
  species MTX3b in cell = 0;  // kegg.compound:C01937
  species MTX4b in cell = 0;  // kegg.compound:C01937
  species MTX5b in cell = 0;  // kegg.compound:C01937
  species $EMTX in ext = 0;  // kegg.compound:C01937
  species $dUMP in cell = 20.76;  // CHEBI:17622 kegg.compound:C00365
  species $GAR in cell = 689.6;  // kegg.compound:C03838
  species $serine in cell = 123.3;  // CHEBI:17115 kegg.compound:C00065
  species $formate in cell = 500;  // CHEBI:15740 kegg.compound:C00058
  species $ATP in cell = 2980;  // CHEBI:15422 kegg.compound:C00002
  species $glutamine in cell = 7170;  // CHEBI:18050 kegg.compound:C00064
  species $glycine in cell = 1600;  // CHEBI:15428 kegg.compound:C00037
  species $NADP in cell = 6.73;  // CHEBI:18009 kegg.compound:C00006
  species $NADPH in cell = 294;  // CHEBI:16474 kegg.compound:C00005
  species $homocysteine in cell = 10;  // CHEBI:17230 kegg.compound:C05330

  // Parameters:
  Keq = 0.32;

  // Assignment rules:
  FH2b := FH2f*DHFRf/Keq;
  DHFRtot := FH2b + DHFRf + MTX1b + MTX2b + MTX3b + MTX4b + MTX5b;

  // Reactions:
  SHMT: FH4 + $serine => CH2FH4; cell*(SHMT_Vm*(serine/SHMT_Km2/(1 + serine/SHMT_Km2))*(FH4/SHMT_Km1)/(1 + FH4/SHMT_Km1));  // kegg.reaction:R00945; isVersionOf ec-code:2.1.2.1
    SHMT_Vm = 18330; SHMT_Km1 = 1.7; SHMT_Km2 = 210;
  SHMTr: CH2FH4 => FH4; cell*(SHMTr_Vm*(glycine/SHMTr_Km2/(1 + glycine/SHMTr_Km2))*(CH2FH4/SHMTr_Km1)/(1 + CH2FH4/SHMTr_Km1));  // modifiers: glycine; kegg.reaction:R00945; isVersionOf ec-code:2.1.2.1
    SHMTr_Vm = 12200000; SHMTr_Km1 = 3200; SHMTr_Km2 = 10000;
  HCHOtoCH2FH4: FH4 + HCHO => CH2FH4; cell*hp*FH4*HCHO;
    hp = 23.2;
  CH2FH4toHCHO: CH2FH4 => FH4 + HCHO; cell*hl*CH2FH4;
    hl = 0.3;
  MTHFR: CH2FH4 + $NADPH => CH3FH4; cell*(MTHFR_Vm*CH2FH4*NADPH/(NADPH*CH2FH4 + CH2FH4*MTHFR_Km2 + (NADPH + MTHFR_Km2)*MTHFR_Km1*(1 + MTX1/MTHFR_Ki21 + MTX2/MTHFR_Ki22 + MTX3/MTHFR_Ki23 + MTX4/MTHFR_Ki24 + MTX5/MTHFR_Ki25 + FH2f/MTHFR_Ki1)));  // modifiers: FH2f, MTX1, MTX2, MTX3, MTX4, MTX5; kegg.reaction:R01224; isVersionOf ec-code:1.5.1.20
    MTHFR_Vm = 224.8; MTHFR_Km1 = 50; MTHFR_Km2 = 50; MTHFR_Ki1 = 0.4; MTHFR_Ki21 = 59; MTHFR_Ki22 = 21.3; MTHFR_Ki23 = 7.68; MTHFR_Ki24 = 2.77; MTHFR_Ki25 = 1;
  MTR: CH3FH4 + $homocysteine => FH4; cell*(MTR_Vm*(homocysteine/MTR_Km2/(1 + homocysteine/MTR_Km2))*(CH3FH4/MTR_Km1)/(1 + CH3FH4/MTR_Km1));  // kegg.reaction:R00946; isVersionOf ec-code:2.1.1.13
    MTR_Vm = 22600; MTR_Km1 = 125; MTR_Km2 = 2900;
  HCOOHtoCHOFH4: FH4 + $formate + $ATP => CHOFH4; cell*(HCOOHtoCHOFH4_Vm/((1 + HCOOHtoCHOFH4_Km1/FH4)*(1 + HCOOHtoCHOFH4_Km2/ATP)*(1 + Km3/formate)));  // kegg.reaction:R00943; isVersionOf ec-code:6.3.4.3
    HCOOHtoCHOFH4_Vm = 3600; HCOOHtoCHOFH4_Km1 = 230; HCOOHtoCHOFH4_Km2 = 56; Km3 = 1600;
  GARFT: CHOFH4 + $GAR => FGAR + FH4; cell*(GARFT_Vm*CHOFH4*GAR/(GAR*CHOFH4 + CHOFH4*GARFT_Km2 + (GAR + GARFT_Km2)*GARFT_Km1*(1 + MTX1/GARFT_Ki21 + MTX2/GARFT_Ki22 + MTX3/GARFT_Ki23 + MTX4/GARFT_Ki24 + MTX5/GARFT_Ki25 + FH2f/GARFT_Ki1 + FFH2/GARFT_Ki1f)));  // modifiers: FH2f, FFH2, MTX1, MTX2, MTX3, MTX4, MTX5; kegg.reaction:R04325 reactome:REACT_1509; isVersionOf ec-code:2.1.2.2
    GARFT_Vm = 4126; GARFT_Km1 = 4.9; GARFT_Km2 = 52; GARFT_Ki1 = 5; GARFT_Ki1f = 1; GARFT_Ki21 = 84; GARFT_Ki22 = 60; GARFT_Ki23 = 43; GARFT_Ki24 = 31; GARFT_Ki25 = 22;
  ATIC7: CHOFH4 + AICAR => FH4; cell*(ATIC7_Vm*CHOFH4*AICAR/(AICAR*CHOFH4 + CHOFH4*ATIC7_Km2 + (AICAR + ATIC7_Km2)*ATIC7_Km1*(1 + MTX1/ATIC7_Ki21 + MTX2/ATIC7_Ki22 + MTX3/ATIC7_Ki23 + MTX4/ATIC7_Ki24 + MTX5/ATIC7_Ki25 + FH2f/ATIC7_Ki1 + FFH2/ATIC7_Ki1f)));  // modifiers: FH2f, FFH2, MTX1, MTX2, MTX3, MTX4, MTX5; kegg.reaction:R04560 reactome:REACT_812; isVersionOf ec-code:2.1.2.3
    ATIC7_Vm = 31675; ATIC7_Km1 = 5.5; ATIC7_Km2 = 24; ATIC7_Ki1 = 2.89; ATIC7_Ki1f = 5.3; ATIC7_Ki21 = 40; ATIC7_Ki22 = 31.5; ATIC7_Ki23 = 2.33; ATIC7_Ki24 = 3.61; ATIC7_Ki25 = 5.89;
  MTHFD: CH2FH4 + $NADP => CHOFH4; cell*MTHFD_Vm*(CH2FH4/MTHFD_Km1/(1 + CH2FH4/MTHFD_Km1))*(NADP/MTHFD_Km2/(1 + NADP/MTHFD_Km2));  // hasPart ec-code:1.5.1.5 ec-code:6.3.4.3 kegg.reaction:R01220 kegg.reaction:R01655
    MTHFD_Vm = 68500; MTHFD_Km1 = 3; MTHFD_Km2 = 21.8;
  TYMS: CH2FH4 + $dUMP => FH2f; cell*(TYMS_Vm*CH2FH4*dUMP/(dUMP*CH2FH4*(1 + MTX1/TYMS_Ki21 + MTX2/TYMS_Ki22 + MTX3/TYMS_Ki23 + MTX4/TYMS_Ki24 + MTX5/TYMS_Ki25 + FH2f/TYMS_Ki1) + TYMS_Km1*dUMP*(FFH2/TYMS_Ki1f*(MTX1/TYMS_Ki21) + (1 + FFH2/TYMS_Ki1f)*(1 + MTX2/TYMS_Ki22 + MTX3/TYMS_Ki23 + MTX4/TYMS_Ki24 + MTX5/TYMS_Ki25 + FH2f/TYMS_Ki1)) + TYMS_Km1*TYMS_Km2*(1 + MTX2/TYMS_Ki22 + MTX3/TYMS_Ki23 + MTX4/TYMS_Ki24 + MTX5/TYMS_Ki25 + FH2f/TYMS_Ki1)));  // modifiers: FFH2, MTX1, MTX2, MTX3, MTX4, MTX5; kegg.reaction:R02101; isVersionOf ec-code:2.1.1.45
    TYMS_Vm = 58; TYMS_Km1 = 2.5; TYMS_Km2 = 1.8; TYMS_Ki1 = 3; TYMS_Ki1f = 1.6; TYMS_Ki21 = 13; TYMS_Ki22 = 0.08; TYMS_Ki23 = 0.07; TYMS_Ki24 = 0.065; TYMS_Ki25 = 0.047;
  DHFReductase: FH2f => FH4; cell*kter*FH2b;  // modifiers: FH2b; kegg.reaction:R00939; isVersionOf ec-code:1.5.1.3
    kter = 2109.4;
  FFH2syn: FH2f => FFH2; cell*FFH2syn_Vm*FH2f;  // kegg.reaction:R02238; isVersionOf ec-code:6.3.4.17
    FFH2syn_Vm = 65;
  ATIC12: FFH2 + AICAR => FH2f; cell*(ATIC12_Vm*FFH2*AICAR/(AICAR*FFH2 + FFH2*ATIC12_Km2 + (AICAR + ATIC12_Km2)*ATIC12_Km1*(1 + MTX1/ATIC12_Ki21 + MTX2/ATIC12_Ki22 + MTX3/ATIC12_Ki23 + MTX4/ATIC12_Ki24 + MTX5/ATIC12_Ki25 + FH2f/ATIC12_Ki1 + FFH2/ATIC12_Ki1f)));  // modifiers: MTX1, MTX2, MTX3, MTX4, MTX5; isVersionOf ec-code:2.1.2.3; kegg.reaction:R04560
    ATIC12_Vm = 9503; ATIC12_Km1 = 5.3; ATIC12_Km2 = 24; ATIC12_Ki1 = 2.89; ATIC12_Ki1f = 5.5; ATIC12_Ki21 = 40; ATIC12_Ki22 = 31.5; ATIC12_Ki23 = 2.33; ATIC12_Ki24 = 3.61; ATIC12_Ki25 = 5.89;
  AICARsyn: FGAR => AICAR; cell*AICARsyn_Vm*(glutamine/AICARsyn_Km1/(1 + glutamine/AICARsyn_Km1))*(FGAR/AICARsyn_Km2/(1 + FGAR/AICARsyn_Km2));  // modifiers: glutamine; isVersionOf ec-code:6.3.5.3
    AICARsyn_Vm = 4656; AICARsyn_Km1 = 100; AICARsyn_Km2 = 100;
  FPGS12: MTX1 => MTX2; cell*FPGS12_Vm*MTX1;  // isVersionOf ec-code:6.3.2.17
    FPGS12_Vm = 0.129;
  FPGS23: MTX2 => MTX3; cell*FPGS23_Vm*MTX2;  // isVersionOf ec-code:6.3.2.17
    FPGS23_Vm = 0.369;
  FPGS34: MTX3 => MTX4; cell*FPGS34_Vm*MTX3;  // isVersionOf ec-code:6.3.2.17
    FPGS34_Vm = 0.118;
  FPGS45: MTX4 => MTX5; cell*FPGS45_Vm*MTX4;  // isVersionOf ec-code:6.3.2.17
    FPGS45_Vm = 0.185;
  GGH21: MTX2 => MTX1; cell*GGH21_Vm*MTX2;  // isVersionOf ec-code:3.4.19.9
    GGH21_Vm = 0.195;
  GGH32: MTX3 => MTX2; cell*GGH32_Vm*MTX3;  // isVersionOf ec-code:3.4.19.9
    GGH32_Vm = 0.025;
  GGH43: MTX4 => MTX3; cell*GGH43_Vm*MTX4;  // ec-code:3.4.19.9
    GGH43_Vm = 0.031;
  GGH54: MTX5 => MTX4; cell*GGH54_Vm*MTX5;  // ec-code:3.4.19.9
    GGH54_Vm = 0.191;
  RFC: $EMTX => MTX1; ext*(RFC_Vm*EMTX/(Km + EMTX));  // GO:0008517
    RFC_Vm = 82.2; Km = 8.2;
  MTX1export: MTX1 => ; cell*MTX1export_Vm*MTX1;  // GO:0008517
    MTX1export_Vm = 4.65;
  MTX2export: MTX2 => ; cell*MTX2export_Vm*MTX2;  // GO:0008517
    MTX2export_Vm = 0;
  MTX3export: MTX3 => ; cell*MTX3export_Vm*MTX3;  // GO:0008517
    MTX3export_Vm = 0.063;
  MTX4export: MTX4 => ; cell*MTX4export_Vm*MTX4;  // isVersionOf GO:0008517
    MTX4export_Vm = 0.063;
  MTX5export: MTX5 => ; cell*MTX5export_Vm*MTX5;  // isVersionOf GO:0008517
    MTX5export_Vm = 0.063;
  MTX1on: MTX1 + DHFRf => MTX1b; cell*MTX1on_Vm*DHFRf*MTX1;
    MTX1on_Vm = 23100;
  MTX2on: MTX2 + DHFRf => MTX2b; cell*MTX2on_Vm*DHFRf*MTX2;
    MTX2on_Vm = 44300;
  MTX3on: MTX3 + DHFRf => MTX3b; cell*MTX3on_Vm*DHFRf*MTX3;
    MTX3on_Vm = 85100;
  MTX4on: MTX4 + DHFRf => MTX4b; cell*MTX4on_Vm*DHFRf*MTX4;
    MTX4on_Vm = 163000;
  MTX5on: MTX5 + DHFRf => MTX5b; cell*MTX5on_Vm*DHFRf*MTX5;
    MTX5on_Vm = 314000;
  MTX1off: MTX1b => MTX1 + DHFRf; cell*MTX1off_Vm*MTX1b;
    MTX1off_Vm = 0.42;
  MTX2off: MTX2b => MTX2 + DHFRf; cell*MTX2off_Vm*MTX2b;
    MTX2off_Vm = 0.42;
  MTX3off: MTX3b => MTX3 + DHFRf; cell*MTX3off_Vm*MTX3b;
    MTX3off_Vm = 0.42;
  MTX4off: MTX4b => MTX4 + DHFRf; cell*MTX4off_Vm*MTX4b;
    MTX4off_Vm = 0.42;
  MTX5off: MTX5b => MTX5 + DHFRf; cell*MTX5off_Vm*MTX5b;
    MTX5off_Vm = 0.42;
  DHFRfsyn: => DHFRf; cell*(k0 + k1*EMTX);  // modifiers: EMTX
    k0 = 0.0192; k1 = 0.04416;
  DHFRdeg: DHFRf => ; DHFRdeg_Vm*cell*(DHFRf + FH2b);  // modifiers: FH2b
    DHFRdeg_Vm = 0.03;
  FH2bdeg: => FH2f; cell*FH2bdeg_Vm*FH2b;  // modifiers: FH2b
    FH2bdeg_Vm = 0.03;
  MTX1deg: MTX1b => MTX1; cell*MTX1deg_Vm*MTX1b;
    MTX1deg_Vm = 0.03;
  MTX2deg: MTX2b => MTX2; cell*MTX2deg_Vm*MTX2b;
    MTX2deg_Vm = 0.03;
  MTX3deg: MTX3b => MTX3; cell*MTX3deg_Vm*MTX3b;
    MTX3deg_Vm = 0.03;
  MTX4deg: MTX4b => MTX4; cell*MTX4deg_Vm*MTX4b;
    MTX4deg_Vm = 0.03;
  MTX5deg: MTX5b => MTX5; cell*MTX5deg_Vm*MTX5b;
    MTX5deg_Vm = 0.03;

  // Unit definitions:
  // Default unit of substance redefined to micromole by comparison with the article. Nicolas Le Novere
  unit substance = 1e-6 mole; substance is "micromole (new default)";
  // Default unit of time redefined to hour by comparison with the article. Nicolas Le Novere
  unit time = 3600 second; time is "heure (new default)";
  unit volume = litre;
  unit area = metre^2;
end
